Aircraft
0
0 0 0
0.53774 0.29937 1.7962
0 0 0
0
SURFACE
wing
20 1 20 1

YDUPLICATE
0

ANGLE
0

SECTION
0 0 0 0.29937 0

AFILE
s8052.dat

SECTION
0 0.89811 0 0.29937 0

AFILE
s8052.dat

SURFACE
Horizontal
20 1 20 1

YDUPLICATE
0

ANGLE
-1.0856

SECTION
0.74843 0 0 0.20741 0

AFILE
NACA 0004.dat

CONTROL
elevator 1 0 0 0 0 1

SECTION
0.74843 0.32794 0.25402 0.16397 0

AFILE
NACA 0004.dat

CONTROL
elevator 1 0 0 0 0 1
